# надо задавать вручную f(x,y), актуальная информация о функции в g
x0 := 0
y0 := 0
h := 0
Xend := 0
g := 0
f(x, y) := y - x^2 + 1
ModifiedEuler(x0, y0, Xend, h, f) :=
    n ← ceil((Xend - x0)/h)
    x ← x0
    y ← y0
    Xvec ← x
    Yvec ← y
    for i ∈ 1 .. n
        x ← x + h
        y ← y + h*f(x - h/2, y + (h/2)*f(x - h, y))
        Xvec ← augment(Xvec, x)
        Yvec ← augment(Yvec, y)
    augment(Xvec, Yvec)
Result := ModifiedEuler(x0, y0, Xend, h, f)  # error: Невозможно вычислить выражение, поскольку оно делится на ноль.
xdata := submatrix(Result, 0, 0, 0, cols(Result)/2 - 1)  # error: Эта переменная не определена. Проверьте правильность установки обозначения.
ydata := submatrix(Result, 0, 0, cols(Result)/2, cols(Result) - 1)  # error: Эта переменная не определена. Проверьте правильность установки обозначения.
gxdata := transpose(xdata)  # error: Эта переменная не определена. Проверьте правильность установки обозначения.
gydata := transpose(ydata)  # error: Эта переменная не определена. Проверьте правильность установки обозначения.
# [plot: gydata vs gxdata]
